! ===== APDL INPUT FILE ====== !

/UNITS,MPa

! EigenBuckling Analysis !
/PREP7

ET,1,BEAM189 ! Use BEAM189

! CROSS SECTION !
! Corner Type (SECTYPE = 1)
SECTYPE,1,BEAM,CTUBE
SECDATA,35.05,38.05,8
! Brace Section Type (SECTYPE = 2)
SECTYPE,2,BEAM,CTUBE
SECDATA,11.15,13.45,8

! MATERIAL DATA
MP,EX,1,200000.0 ! [MPa]
MP,PRXY,1,0.3
MP,DENS,1.7850E-6 ! [kg/mm^3]

! KEYPOINT AND LINES !
K,1, 0.000, 0.000, 0.000
K,2, 0.000, 1000.000, 0.000
L,1,2
LSEL,S,LINE,,1
CM,COLUMN_1,LINE
LSEL,ALL
K,3, 1000.000, 1000.000, 0.000
L,2,3
LSEL,S,LINE,,2
CM,BRACE_1,LINE
LSEL,ALL
K,4, 1000.000, 0.000, 0.000
L,3,4
LSEL,S,LINE,,3
CM,COLUMN_2,LINE
LSEL,ALL

! ELEMENT SIZE !
ESIZE,10

! Meshing CORNER Beams (SECNUM=1) !
SECNUM,1
LSEL,ALL
LSEL,NONE
LSEL,S,LINE,,1
LSEL,A,LINE,,3
LMESH,ALL

! Meshing BRACE beam (SECNUM=2) !
SECNUM,2
LSEL,ALL
LSEL,NONE
LSEL,S,LINE,,2
LMESH,ALL

/ESHAPE,1 ! Display Cross Section
! SOLUTION !
/SOLU
ANTYPE, STATIC
EQSLV,SPARSE
PSTRES,ON
! -- BOUNDARY CONDITIONS -- !

! Force
ALLSEL,ALL
SELTOL,1.0E-6
*GET, NodeXMax, NODE, 0, MXLOC, X
*GET, NodeXMin, NODE, 0, MNLOC, X
*GET, NodeYMax, NODE, 0, MXLOC, Y
NSEL,S,LOC,X,NodeXMin
NSEL,R,LOC,Y,NodeYMax
F,ALL,FY,-100
ALLSEL,ALL
NSEL,S,LOC,X,NodeXMax
NSEL,R,LOC,Y,NodeYMax
F,ALL,FY,-100
ALLSEL,ALL
NSEL,S,LOC,X,NodeXMin
NSEL,R,LOC,Y,NodeYMax
F,ALL,FX,260
ALLSEL,ALL
! Displacement !
ALLSEL,ALL
*GET, NodeYMin, NODE, 0, MNLOC, Y
NSEL,S,LOC,Y,NodeYMin
D,ALL,ALL,0
ALLSEL,ALL

SOLVE

FINISH
! Eigenbuckling Solution!
/SOLU
ANTYPE,BUCKLE
BUCOPT,LANB,4
MXPAND,ALL
OUTRES,ALL,ALL
SAVE,BUCKLE
SOLVE
FINISH
/POST1
*GET,MS1,MODE,1,FREQ
*CFOPEN,Eigenvalue1,txt
*VWRITE,MS1
(F10.5)
*CFCLOS
