! ===== APDL INPUT FILE ====== !
!   Eigenbuckling Analysis     !
! ============================ !

/UNITS,MPa ! Set units [mm,Mg,s,C]

! Static Structural Analysis !
/PREP7
ET,1,BEAM189 ! Use BEAM189 Elements

! CROSS SECTION !
! Corner Type (SECTYPE = 1)
SECTYPE,1,BEAM,CTUBE
SECDATA,35.05,38.05,8
! Brace Section Type (SECTYPE = 2)
SECTYPE,2,BEAM,CTUBE
SECDATA,11.15,13.45,8

! MATERIAL DATA
MP,EX,1,200000.0 ! [MPa]
MP,PRXY,1,0.3
MP,DENS,1.7850E-6 ! [kg/mm^3]

! SPECIAL MATERIAL REGION ABOVE Y=4070
MP,EX,2,2E+09
MP,PRXY,2,0.3
MP,DENS,2,1.7850E-6
! KEYPOINT AND LINES !
K,1, 202.073, 87.000, 0.000
K,2, -101.036, 87.000, -175.000
L,1,2
LSEL,S,LINE,,1
CM,BRACE_1,LINE
LSEL,ALL
K,3, -101.036, 87.000, 175.000
L,2,3
LSEL,S,LINE,,2
CM,BRACE_2,LINE
LSEL,ALL
L,3,1
LSEL,S,LINE,,3
CM,BRACE_3,LINE
LSEL,ALL
K,4, 202.073, 0.000, 0.000
K,5, 202.073, 812.000, 0.000
L,4,5
LSEL,S,LINE,,4
CM,COLUMN_1,LINE
LSEL,ALL
K,6, -101.036, 102.000, -175.000
K,7, -101.036, 392.000, 175.000
L,6,7
LSEL,S,LINE,,5
CM,BRACE_4,LINE
LSEL,ALL
K,8, -101.036, 0.000, -175.000
K,9, -101.036, 812.000, -175.000
L,8,9
LSEL,S,LINE,,6
CM,COLUMN_2,LINE
LSEL,ALL
K,10, -101.036, 0.000, 175.000
K,11, -101.036, 812.000, 175.000
L,10,11
LSEL,S,LINE,,7
CM,COLUMN_3,LINE
LSEL,ALL
K,12, -101.036, 102.000, 175.000
K,13, 202.073, 392.000, 0.000
L,12,13
LSEL,S,LINE,,8
CM,BRACE_5,LINE
LSEL,ALL
K,14, 202.073, 102.000, 0.000
K,15, -101.036, 392.000, -175.000
L,14,15
LSEL,S,LINE,,9
CM,BRACE_6,LINE
LSEL,ALL
K,16, -101.036, 407.000, -175.000
K,17, 202.073, 407.000, 0.000
L,16,17
LSEL,S,LINE,,10
CM,BRACE_7,LINE
LSEL,ALL
K,18, -101.036, 407.000, 175.000
L,17,18
LSEL,S,LINE,,11
CM,BRACE_8,LINE
LSEL,ALL
L,18,16
LSEL,S,LINE,,12
CM,BRACE_9,LINE
LSEL,ALL
K,19, -101.036, 422.000, -175.000
K,20, 202.073, 712.000, 0.000
L,19,20
LSEL,S,LINE,,13
CM,BRACE_10,LINE
LSEL,ALL
K,21, 202.073, 422.000, 0.000
K,22, -101.036, 712.000, 175.000
L,21,22
LSEL,S,LINE,,14
CM,BRACE_11,LINE
LSEL,ALL
K,23, -101.036, 422.000, 175.000
K,24, -101.036, 712.000, -175.000
L,23,24
LSEL,S,LINE,,15
CM,BRACE_12,LINE
LSEL,ALL
K,25, -101.036, 727.000, 175.000
K,26, -101.036, 727.000, -175.000
L,25,26
LSEL,S,LINE,,16
CM,BRACE_13,LINE
LSEL,ALL
K,27, 202.073, 727.000, 0.000
L,27,26
LSEL,S,LINE,,17
CM,BRACE_14,LINE
LSEL,ALL
L,27,25
LSEL,S,LINE,,18
CM,BRACE_15,LINE
LSEL,ALL
K,28, -101.036, 1537.000, 175.000
K,29, -101.036, 1537.000, -175.000
L,28,29
LSEL,S,LINE,,19
CM,BRACE_16,LINE
LSEL,ALL
K,30, 202.073, 1217.000, 0.000
K,31, -101.036, 1217.000, 175.000
L,30,31
LSEL,S,LINE,,20
CM,BRACE_17,LINE
LSEL,ALL
K,32, -101.036, 912.000, -175.000
K,33, -101.036, 1202.000, 175.000
L,32,33
LSEL,S,LINE,,21
CM,BRACE_18,LINE
LSEL,ALL
K,34, -101.036, 897.000, -175.000
K,35, -101.036, 897.000, 175.000
L,34,35
LSEL,S,LINE,,22
CM,BRACE_19,LINE
LSEL,ALL
K,36, -101.036, 1624.000, -175.000
L,9,36
LSEL,S,LINE,,23
CM,COLUMN_4,LINE
LSEL,ALL
K,37, 202.073, 912.000, 0.000
K,38, -101.036, 1202.000, -175.000
L,37,38
LSEL,S,LINE,,24
CM,BRACE_20,LINE
LSEL,ALL
K,39, -101.036, 1232.000, -175.000
K,40, 202.073, 1522.000, 0.000
L,39,40
LSEL,S,LINE,,25
CM,BRACE_21,LINE
LSEL,ALL
K,41, 202.073, 1624.000, 0.000
L,5,41
LSEL,S,LINE,,26
CM,COLUMN_5,LINE
LSEL,ALL
K,42, 202.073, 1537.000, 0.000
L,42,28
LSEL,S,LINE,,27
CM,BRACE_22,LINE
LSEL,ALL
K,43, -101.036, 1217.000, -175.000
L,43,30
LSEL,S,LINE,,28
CM,BRACE_23,LINE
LSEL,ALL
K,44, -101.036, 1624.000, 175.000
L,11,44
LSEL,S,LINE,,29
CM,COLUMN_6,LINE
LSEL,ALL
L,42,29
LSEL,S,LINE,,30
CM,BRACE_24,LINE
LSEL,ALL
L,31,43
LSEL,S,LINE,,31
CM,BRACE_25,LINE
LSEL,ALL
K,45, 202.073, 1232.000, 0.000
K,46, -101.036, 1522.000, 175.000
L,45,46
LSEL,S,LINE,,32
CM,BRACE_26,LINE
LSEL,ALL
K,47, 202.073, 897.000, 0.000
L,47,34
LSEL,S,LINE,,33
CM,BRACE_27,LINE
LSEL,ALL
L,35,47
LSEL,S,LINE,,34
CM,BRACE_28,LINE
LSEL,ALL
K,48, -101.036, 912.000, 175.000
K,49, 202.073, 1202.000, 0.000
L,48,49
LSEL,S,LINE,,35
CM,BRACE_29,LINE
LSEL,ALL
K,50, -101.036, 1232.000, 175.000
K,51, -101.036, 1522.000, -175.000
L,50,51
LSEL,S,LINE,,36
CM,BRACE_30,LINE
LSEL,ALL
K,52, -101.036, 2436.000, 175.000
L,44,52
LSEL,S,LINE,,37
CM,COLUMN_7,LINE
LSEL,ALL
K,53, -101.036, 2042.000, -175.000
K,54, 202.073, 2332.000, 0.000
L,53,54
LSEL,S,LINE,,38
CM,BRACE_31,LINE
LSEL,ALL
K,55, 202.073, 2027.000, 0.000
K,56, -101.036, 2027.000, 175.000
L,55,56
LSEL,S,LINE,,39
CM,BRACE_32,LINE
LSEL,ALL
K,57, -101.036, 2436.000, -175.000
L,36,57
LSEL,S,LINE,,40
CM,COLUMN_8,LINE
LSEL,ALL
K,58, -101.036, 2027.000, -175.000
L,56,58
LSEL,S,LINE,,41
CM,BRACE_33,LINE
LSEL,ALL
K,59, 202.073, 2347.000, 0.000
K,60, -101.036, 2347.000, -175.000
L,59,60
LSEL,S,LINE,,42
CM,BRACE_34,LINE
LSEL,ALL
K,61, 202.073, 2436.000, 0.000
L,41,61
LSEL,S,LINE,,43
CM,COLUMN_9,LINE
LSEL,ALL
K,62, -101.036, 1722.000, 175.000
K,63, 202.073, 2012.000, 0.000
L,62,63
LSEL,S,LINE,,44
CM,BRACE_35,LINE
LSEL,ALL
L,58,55
LSEL,S,LINE,,45
CM,BRACE_36,LINE
LSEL,ALL
K,64, -101.036, 1707.000, -175.000
K,65, -101.036, 1707.000, 175.000
L,64,65
LSEL,S,LINE,,46
CM,BRACE_37,LINE
LSEL,ALL
K,66, 202.073, 1707.000, 0.000
L,65,66
LSEL,S,LINE,,47
CM,BRACE_38,LINE
LSEL,ALL
K,67, -101.036, 2347.000, 175.000
L,67,60
LSEL,S,LINE,,48
CM,BRACE_39,LINE
LSEL,ALL
L,59,67
LSEL,S,LINE,,49
CM,BRACE_40,LINE
LSEL,ALL
K,68, 202.073, 2042.000, 0.000
K,69, -101.036, 2332.000, 175.000
L,68,69
LSEL,S,LINE,,50
CM,BRACE_41,LINE
LSEL,ALL
K,70, -101.036, 1722.000, -175.000
K,71, -101.036, 2012.000, 175.000
L,70,71
LSEL,S,LINE,,51
CM,BRACE_42,LINE
LSEL,ALL
K,72, 202.073, 1722.000, 0.000
K,73, -101.036, 2012.000, -175.000
L,72,73
LSEL,S,LINE,,52
CM,BRACE_43,LINE
LSEL,ALL
K,74, -101.036, 2042.000, 175.000
K,75, -101.036, 2332.000, -175.000
L,74,75
LSEL,S,LINE,,53
CM,BRACE_44,LINE
LSEL,ALL
L,66,64
LSEL,S,LINE,,54
CM,BRACE_45,LINE
LSEL,ALL
K,76, 202.073, 3248.000, 0.000
L,61,76
LSEL,S,LINE,,55
CM,COLUMN_10,LINE
LSEL,ALL
K,77, 202.073, 2517.000, 0.000
K,78, -101.036, 2517.000, -175.000
L,77,78
LSEL,S,LINE,,56
CM,BRACE_46,LINE
LSEL,ALL
K,79, -101.036, 2532.000, -175.000
K,80, -101.036, 2822.000, 175.000
L,79,80
LSEL,S,LINE,,57
CM,BRACE_47,LINE
LSEL,ALL
K,81, -101.036, 3157.000, 175.000
K,82, -101.036, 3157.000, -175.000
L,81,82
LSEL,S,LINE,,58
CM,BRACE_48,LINE
LSEL,ALL
K,83, -101.036, 2852.000, 175.000
K,84, -101.036, 3142.000, -175.000
L,83,84
LSEL,S,LINE,,59
CM,BRACE_49,LINE
LSEL,ALL
K,85, -101.036, 2837.000, 175.000
K,86, -101.036, 2837.000, -175.000
L,85,86
LSEL,S,LINE,,60
CM,BRACE_50,LINE
LSEL,ALL
K,87, 202.073, 2532.000, 0.000
K,88, -101.036, 2822.000, -175.000
L,87,88
LSEL,S,LINE,,61
CM,BRACE_51,LINE
LSEL,ALL
K,89, -101.036, 3248.000, -175.000
L,57,89
LSEL,S,LINE,,62
CM,COLUMN_11,LINE
LSEL,ALL
K,90, 202.073, 3157.000, 0.000
L,90,81
LSEL,S,LINE,,63
CM,BRACE_52,LINE
LSEL,ALL
K,91, -101.036, 3248.000, 175.000
L,52,91
LSEL,S,LINE,,64
CM,COLUMN_12,LINE
LSEL,ALL
K,92, 202.073, 2837.000, 0.000
L,86,92
LSEL,S,LINE,,65
CM,BRACE_53,LINE
LSEL,ALL
K,93, -101.036, 2532.000, 175.000
K,94, 202.073, 2822.000, 0.000
L,93,94
LSEL,S,LINE,,66
CM,BRACE_54,LINE
LSEL,ALL
K,95, 202.073, 2852.000, 0.000
K,96, -101.036, 3142.000, 175.000
L,95,96
LSEL,S,LINE,,67
CM,BRACE_55,LINE
LSEL,ALL
K,97, -101.036, 2852.000, -175.000
K,98, 202.073, 3142.000, 0.000
L,97,98
LSEL,S,LINE,,68
CM,BRACE_56,LINE
LSEL,ALL
L,90,82
LSEL,S,LINE,,69
CM,BRACE_57,LINE
LSEL,ALL
K,99, -101.036, 2517.000, 175.000
L,78,99
LSEL,S,LINE,,70
CM,BRACE_58,LINE
LSEL,ALL
L,99,77
LSEL,S,LINE,,71
CM,BRACE_59,LINE
LSEL,ALL
L,92,85
LSEL,S,LINE,,72
CM,BRACE_60,LINE
LSEL,ALL
K,100, -101.036, 3327.000, -175.000
K,101, -101.036, 3327.000, 175.000
L,100,101
LSEL,S,LINE,,73
CM,BRACE_61,LINE
LSEL,ALL
K,102, -101.036, 3342.000, -175.000
K,103, -101.036, 3632.000, 175.000
L,102,103
LSEL,S,LINE,,74
CM,BRACE_62,LINE
LSEL,ALL
K,104, 202.073, 3342.000, 0.000
K,105, -101.036, 3632.000, -175.000
L,104,105
LSEL,S,LINE,,75
CM,BRACE_63,LINE
LSEL,ALL
K,106, -101.036, 3662.000, -175.000
K,107, 202.073, 3952.000, 0.000
L,106,107
LSEL,S,LINE,,76
CM,BRACE_64,LINE
LSEL,ALL
K,108, 202.073, 3647.000, 0.000
K,109, -101.036, 3647.000, 175.000
L,108,109
LSEL,S,LINE,,77
CM,BRACE_65,LINE
LSEL,ALL
K,110, 202.073, 3662.000, 0.000
K,111, -101.036, 3952.000, 175.000
L,110,111
LSEL,S,LINE,,78
CM,BRACE_66,LINE
LSEL,ALL
K,112, -101.036, 4060.000, -175.000
L,89,112
LSEL,S,LINE,,79
CM,COLUMN_13,LINE
LSEL,ALL
K,113, 202.073, 3967.000, 0.000
K,114, -101.036, 3967.000, -175.000
L,113,114
LSEL,S,LINE,,80
CM,BRACE_67,LINE
LSEL,ALL
K,115, -101.036, 3967.000, 175.000
L,113,115
LSEL,S,LINE,,81
CM,BRACE_68,LINE
LSEL,ALL
K,116, 202.073, 4060.000, 0.000
L,76,116
LSEL,S,LINE,,82
CM,COLUMN_14,LINE
LSEL,ALL
K,117, -101.036, 3342.000, 175.000
K,118, 202.073, 3632.000, 0.000
L,117,118
LSEL,S,LINE,,83
CM,BRACE_69,LINE
LSEL,ALL
L,115,114
LSEL,S,LINE,,84
CM,BRACE_70,LINE
LSEL,ALL
K,119, -101.036, 3647.000, -175.000
L,109,119
LSEL,S,LINE,,85
CM,BRACE_71,LINE
LSEL,ALL
L,119,108
LSEL,S,LINE,,86
CM,BRACE_72,LINE
LSEL,ALL
K,120, -101.036, 4060.000, 175.000
L,91,120
LSEL,S,LINE,,87
CM,COLUMN_15,LINE
LSEL,ALL
K,121, -101.036, 3662.000, 175.000
K,122, -101.036, 3952.000, -175.000
L,121,122
LSEL,S,LINE,,88
CM,BRACE_73,LINE
LSEL,ALL
K,123, 202.073, 3327.000, 0.000
L,123,100
LSEL,S,LINE,,89
CM,BRACE_74,LINE
LSEL,ALL
L,101,123
LSEL,S,LINE,,90
CM,BRACE_75,LINE
LSEL,ALL
K,124, 202.073, 4080.277, 0.000
L,116,124
LSEL,S,LINE,,91
CM,COLUMN_16,LINE
LSEL,ALL
K,125, 119.763, 4284.000, 0.000
L,124,125
LSEL,S,LINE,,92
CM,TOPMAT,LINE
CM,BRACE_76,LINE
LSEL,ALL
K,126, -101.036, 4080.277, 175.000
L,120,126
LSEL,S,LINE,,93
CM,COLUMN_17,LINE
LSEL,ALL
K,127, -59.882, 4284.000, 103.718
L,126,127
LSEL,S,LINE,,94
CM,TOPMAT,LINE
CM,BRACE_77,LINE
LSEL,ALL
K,128, -101.036, 4059.658, -175.000
K,129, -101.036, 4080.277, -175.000
L,128,129
LSEL,S,LINE,,95
CM,COLUMN_18,LINE
LSEL,ALL
K,130, -59.882, 4284.000, -103.718
L,129,130
LSEL,S,LINE,,96
CM,TOPMAT,LINE
CM,BRACE_78,LINE
LSEL,ALL
L,129,126
LSEL,S,LINE,,97
CM,TOPMAT,LINE
CM,BRACE_79,LINE
LSEL,ALL
L,124,129
LSEL,S,LINE,,98
CM,TOPMAT,LINE
CM,BRACE_80,LINE
LSEL,ALL
L,126,124
LSEL,S,LINE,,99
CM,TOPMAT,LINE
CM,BRACE_81,LINE
LSEL,ALL
L,125,130
LSEL,S,LINE,,100
CM,TOPMAT,LINE
CM,BRACE_82,LINE
LSEL,ALL
L,127,125
LSEL,S,LINE,,101
CM,TOPMAT,LINE
CM,BRACE_83,LINE
LSEL,ALL
L,130,127
LSEL,S,LINE,,102
CM,TOPMAT,LINE
CM,BRACE_84,LINE
LSEL,ALL
K,131, 0.000, 4080.277, 0.000
L,124,131
LSEL,S,LINE,,103
CM,TOPMAT,LINE
CM,BRACE_85,LINE
LSEL,ALL
L,131,129
LSEL,S,LINE,,104
CM,TOPMAT,LINE
CM,BRACE_86,LINE
LSEL,ALL
L,126,131
LSEL,S,LINE,,105
CM,TOPMAT,LINE
CM,BRACE_87,LINE
LSEL,ALL
K,132, 0.000, 4284.000, 0.000
L,125,132
LSEL,S,LINE,,106
CM,TOPMAT,LINE
CM,BRACE_88,LINE
LSEL,ALL
L,132,130
LSEL,S,LINE,,107
CM,TOPMAT,LINE
CM,BRACE_89,LINE
LSEL,ALL
L,132,127
LSEL,S,LINE,,108
CM,TOPMAT,LINE
CM,BRACE_90,LINE
LSEL,ALL
L,131,132
LSEL,S,LINE,,109
CM,TOPMAT,LINE
CM,COLUMN_19,LINE
LSEL,ALL
L,126,125
LSEL,S,LINE,,110
CM,TOPMAT,LINE
CM,BRACE_91,LINE
LSEL,ALL
L,124,130
LSEL,S,LINE,,111
CM,TOPMAT,LINE
CM,BRACE_92,LINE
LSEL,ALL
L,129,127
LSEL,S,LINE,,112
CM,TOPMAT,LINE
CM,BRACE_93,LINE
LSEL,ALL

! ELEMENT SIZE !
ESIZE,100

! Meshing CORNER Beams (SECNUM=1) !
SECNUM,1
LSEL,ALL
LSEL,S,LINE,,4
LSEL,A,LINE,,6
LSEL,A,LINE,,7
LSEL,A,LINE,,23
LSEL,A,LINE,,26
LSEL,A,LINE,,29
LSEL,A,LINE,,37
LSEL,A,LINE,,40
LSEL,A,LINE,,43
LSEL,A,LINE,,55
LSEL,A,LINE,,62
LSEL,A,LINE,,64
LSEL,A,LINE,,79
LSEL,A,LINE,,82
LSEL,A,LINE,,87
LSEL,A,LINE,,91
LSEL,A,LINE,,93
LSEL,A,LINE,,95
LSEL,A,LINE,,109
LMESH,ALL

! Meshing BRACE beam (SECNUM=2) !
SECNUM,2
LSEL,ALL
LSEL,S,LINE,,1
LSEL,A,LINE,,2
LSEL,A,LINE,,3
LSEL,A,LINE,,5
LSEL,A,LINE,,8
LSEL,A,LINE,,9
LSEL,A,LINE,,10
LSEL,A,LINE,,11
LSEL,A,LINE,,12
LSEL,A,LINE,,13
LSEL,A,LINE,,14
LSEL,A,LINE,,15
LSEL,A,LINE,,16
LSEL,A,LINE,,17
LSEL,A,LINE,,18
LSEL,A,LINE,,19
LSEL,A,LINE,,20
LSEL,A,LINE,,21
LSEL,A,LINE,,22
LSEL,A,LINE,,24
LSEL,A,LINE,,25
LSEL,A,LINE,,27
LSEL,A,LINE,,28
LSEL,A,LINE,,30
LSEL,A,LINE,,31
LSEL,A,LINE,,32
LSEL,A,LINE,,33
LSEL,A,LINE,,34
LSEL,A,LINE,,35
LSEL,A,LINE,,36
LSEL,A,LINE,,38
LSEL,A,LINE,,39
LSEL,A,LINE,,41
LSEL,A,LINE,,42
LSEL,A,LINE,,44
LSEL,A,LINE,,45
LSEL,A,LINE,,46
LSEL,A,LINE,,47
LSEL,A,LINE,,48
LSEL,A,LINE,,49
LSEL,A,LINE,,50
LSEL,A,LINE,,51
LSEL,A,LINE,,52
LSEL,A,LINE,,53
LSEL,A,LINE,,54
LSEL,A,LINE,,56
LSEL,A,LINE,,57
LSEL,A,LINE,,58
LSEL,A,LINE,,59
LSEL,A,LINE,,60
LSEL,A,LINE,,61
LSEL,A,LINE,,63
LSEL,A,LINE,,65
LSEL,A,LINE,,66
LSEL,A,LINE,,67
LSEL,A,LINE,,68
LSEL,A,LINE,,69
LSEL,A,LINE,,70
LSEL,A,LINE,,71
LSEL,A,LINE,,72
LSEL,A,LINE,,73
LSEL,A,LINE,,74
LSEL,A,LINE,,75
LSEL,A,LINE,,76
LSEL,A,LINE,,77
LSEL,A,LINE,,78
LSEL,A,LINE,,80
LSEL,A,LINE,,81
LSEL,A,LINE,,83
LSEL,A,LINE,,84
LSEL,A,LINE,,85
LSEL,A,LINE,,86
LSEL,A,LINE,,88
LSEL,A,LINE,,89
LSEL,A,LINE,,90
LSEL,A,LINE,,92
LSEL,A,LINE,,94
LSEL,A,LINE,,96
LSEL,A,LINE,,97
LSEL,A,LINE,,98
LSEL,A,LINE,,99
LSEL,A,LINE,,100
LSEL,A,LINE,,101
LSEL,A,LINE,,102
LSEL,A,LINE,,103
LSEL,A,LINE,,104
LSEL,A,LINE,,105
LSEL,A,LINE,,106
LSEL,A,LINE,,107
LSEL,A,LINE,,108
LSEL,A,LINE,,110
LSEL,A,LINE,,111
LSEL,A,LINE,,112
LMESH,ALL

LSEL,ALL
LSEL,S,LINE,,92
LSEL,A,LINE,,94
LSEL,A,LINE,,96
LSEL,A,LINE,,97
LSEL,A,LINE,,98
LSEL,A,LINE,,99
LSEL,A,LINE,,100
LSEL,A,LINE,,101
LSEL,A,LINE,,102
LSEL,A,LINE,,103
LSEL,A,LINE,,104
LSEL,A,LINE,,105
LSEL,A,LINE,,106
LSEL,A,LINE,,107
LSEL,A,LINE,,108
LSEL,A,LINE,,109
LSEL,A,LINE,,110
LSEL,A,LINE,,111
LSEL,A,LINE,,112
ESLL,S  ! select elements on these lines
EMODIF,ALL,MAT,2  ! modify selected elements to material 2
ALLSEL,ALL

NSEL,S,LOC,X,0
NSEL,R,LOC,Y,4080.3
CM,NODE_LOW,NODE
ALLSEL
NSEL,S,LOC,X,0
NSEL,R,LOC,Y,4250.0
CM,NODE_HIGH,NODE
ALLSEL
N,99999,0,4476,0
*SET,tid,52
*SET,cid,51
ET,cid,175
ET,tid,170
KEYO,tid,2,1
KEYO,tid,4,0
KEYO,cid,12,5
KEYO,cid,4,0
KEYO,cid,2,2
MAT,1
REAL,1
TYPE,1
EN,600,NODE_LOW,99999
EN,6001,NODE_HIGH,99999
*SET,_npilot,1068
_npilot1331=_npilot
TYPE,tid
MAT,cid
REAL,cid
TSHAPE,pilo
en,603,_npilot
tshape
CERIG,99999,ALL,ALL
! SOLUTION !
/SOLU
ANTYPE, STATIC
EQSLV,SPARSE
PSTRES,ON

! -- BOUNDARY CONDITIONS -- !
ALLSEL,ALL
SELTOL,1.0E-6
*GET, NodeYMax, NODE, 0, MXLOC, Y
*GET, NodeYMin, NODE, 0, MNLOC, Y
F,99999,FY,-26400
F,99999,FX,502.52
! Displacement !
ALLSEL,ALL
NSEL,S,LOC,Y,NodeYMin
D,ALL,ALL,0
ALLSEL
! Solve the System
SOLVE
FINISH

! ===== APDL OUTPUT FILE ===== !
/POST1
SET,LAST
ALLSEL,ALL

*GET,E_COUNT,ELEM,0,COUNT

! Number of Columns: 19
! Number of Braces : 93

! Open file to write
*CFOPEN, APDL_Eigen_Internal,txt
! Loop over Columns
*DO,ii,1,19,1
   CMSEL,S,COLUMN_%ii%
   ESLL,S
   ESEL,R,ENAME,,189
   *IF,ii,LT,10,THEN
       *VWRITE,ii
       ("NS ColMember_",F2.0)
   *ELSE
       *VWRITE,ii
       ("NS ColMember_",F3.0)
   *ENDIF
*GET,nElem,ELEM,0,COUNT
   *VWRITE,'ElemID','NF [N]','My [Nmm]','Mz [Nmm]','Vy [N]','Vz [N]','T [N/mm]'
   (A12,A20,A20,A20,A20,A20,A20)
   ELEM = 0
   *DO,jj,1,nElem,1
       ELEM = ELNEXT(ELEM)
       *GET,NF,ELEM,ELEM,SMISC,1
       *GET,MY,ELEM,ELEM,SMISC,2
       *GET,MZ,ELEM,ELEM,SMISC,3
       *GET,VY,ELEM,ELEM,SMISC,4
       *GET,VZ,ELEM,ELEM,SMISC,5
       *GET,TQ,ELEM,ELEM,SMISC,6
       *VWRITE,ELEM,NF,MY,MZ,VY,VZ,TQ
       (F12.0,6E20.8)
   *ENDDO

*ENDDO! Loop over Braces
*DO,ii,1,93,1
   CMSEL,S,BRACE_%ii%,LINE
   ESLL,S
   ESEL,R,ENAME,,189
   *IF,ii,LT,10,THEN
       *VWRITE,ii
       ("NS BraceMember_",F2.0)
   *ELSE
       *VWRITE,ii
       ("NS BraceMember_",F3.0)
   *ENDIF
   *GET,nElem,ELEM,0,COUNT
   *VWRITE,'ElemID','NF [N]','My [Nmm]','Mz [Nmm]','Vy [N]','Vz [N]','T [N/mm]'
   (A12,6A20)
   elem = 0
   *DO,jj,1,nElem,1
       ELEM = ELNEXT(ELEM)
       *GET,NF,ELEM,ELEM,SMISC,1
       *GET,MY,ELEM,ELEM,SMISC,2
       *GET,MZ,ELEM,ELEM,SMISC,3
       *GET,VY,ELEM,ELEM,SMISC,4
       *GET,VZ,ELEM,ELEM,SMISC,5
       *GET,TQ,ELEM,ELEM,SMISC,6
       *VWRITE,ELEM,NF,MY,MZ,VY,VZ,TQ
       (F12.0,6E20.8)
   *ENDDO
*ENDDO
*CFCLOS

! Get and Print Mass
ALLSEL
*GET,ecnt,ELEM,0,COUNT
*GET,enum,ELEM,0,NUM,MIN
totvol = 0
*DO,i,1,ecnt
   *GET,ev,ELEM,enum,VOLU
   totvol = totvol + ev
   enum = ELNEXT(enum)
*ENDDO
dens = 7.85E-6 ! kg/mm^3
Comp_mass = dens*totvol

*CFOPEN,MASS_assembly,txt
   *VWRITE,Comp_mass
   (F12.5)
*CFCLOS
FINISH
ALLSEL,ALL

! Eigenbuckling Solution!
/SOLU
ANTYPE,BUCKLE
BUCOPT,LANB,10
MXPAND,ALL
OUTRES,ALL,ALL
SOLVE
FINISH

! Retrieve first 10 eigenvalues
/POST1
*CFOPEN,Eigenvalue1,txt
*DO,jj,1,10,1
   *GET,MS%jj%,MODE,jj,FREQ
   *VWRITE,MS%jj%
   (F10.5)
*ENDDO
*CFCLOS
